Thu 10/08/2015
04:54 PM
$PROBLEM GEERT DATA FIT
$INPUT read=DROP STDY ID IND AMT RATE  DV DVID CMT MDV EVID AGE SEX WT1 BSA CRP1 ALB1 IMMUNO1
 ADA ADAAMT1 DISDUR1 LINE DISACT1 ttfada tlada0 tlast imp ET1 ET2 ET3 ET4 IND1 TIME1 DISDUR IMMUNO DISACT ALB CRP WT ADAAMT TLADADISACT NIND LIND BASET=DROP TIME

;read,STDY,ID,IND,AMT,RATE2,DV,DVID,CMT,MDV,EVID,AGE,SEX,WT,BSA,CRP,ALB,IMMUNO,
;ADA,ADAAMT,DISDUR,PREanti_TNF,DISACT,ttfada,tlada0,tlast,imp,ETA1,ETA2,ETA3,ETA4,ind1,time1,disdur1,immuno1,disact1,alb1,crp1,wt1,adaamt1,tladadisact,nind,lind,baset,newtime

$DATA nmdata2.csv IGNORE=(READ .EQ. #)

$SUBROUTINE ADVAN13 TOL=6

$MODEL
   COMP=(PK1)   ;1
   COMP=(PK2)   ;2
   COMP=(CMHAZ) ;3
   COMP=(HZLAST, INITIALOFF);4
   COMP=(PK1)   ;5
   COMP=(PK2)   ;6
   COMP=(TA1)   ;7
   COMP=(TA2)   ;8

$PK

;SET THE RTLD
IF (NEWIND .LE. 1) BASET=TIME ;INITIALIZE BASET FOR EACH NEW SUBJECT
IF (NEWIND .LE. 1) TSLD=0 ;INITIALIZE TSLD FOR EACH NEW SUBJECT
IF (NEWIND .LE. 1) BASEALB=ALB
IF (BASEALB.LE.0) BASEALB=40

IF (NEWIND .LE. 1) BASEWT=WT
IF (BASEWT.LE.0) BASEWT=70

;NORMALIZE COVARIATES
NWT=(WT/70)
IF (WT .LE. 0) NWT=1
NAGE=(AGE/40)
IF (AGE .LE. 0) NAGE=1
NALB=(ALB/40)
IF (ALB .LE. 0) NALB=1
NCRP=CRP/10
IF (CRP .LE. 0) NCRP=0.1
NDISDUR=DISDUR/15
IF (DISDUR .LE. 0) NDISDUR=1
NTIME=TIME/30

NADAAMT=ADAAMT/100
IF (ADAAMT .LE. 0) NADAAMT=1/100

LINES=EXP(THETA(9)*(LINE-1)) ; LINE STANDARD IS 1

TVCL=THETA(1)
MU_1=LOG(TVCL)
CL=EXP(MU_1+ET1)*NWT**THETA(5)*NALB**THETA(7)*LINES*(1+NADAAMT**THETA(8))

TVV1=THETA(2)
MU_2=LOG(TVV1)
V1=EXP(MU_2+ET2)*NWT**THETA(6)

TVQ=THETA(3)
MU_3=LOG(TVQ)
Q=EXP(MU_3+ET3)*NWT**THETA(5)

TV2=THETA(4)
MU_4=LOG(TV2)
V2=EXP(MU_4+ET4)*NWT**THETA(6)


S1=V1;
;AMT IN MG
;DV=UG/ML WHICH IS MG/L

;TTFADA
B0=THETA(10)+ETA(1)

B1=THETA(11)
ET50=EXP(THETA(12))
ALAG5=128
B2=THETA(13)
B3=THETA(14)

LE=0
IF (LINE.EQ.0) LE=THETA(15)
IF (LINE.EQ.2) LE=THETA(16)
SL=THETA(17)
CP=1/(1+EXP(THETA(18)))

$DES
   ;IF (T.GT.BASET.AND.T.LE.ALAG5) PROP=A(7)/(T-BASET)
   ;IF (T.GT.ALAG5) PROP=(A(7)-A(8))/ALAG5
    IF (T.GT.0) PROP=A(7)/T
   DE=0
   IF (PROP.GT.CP) DE=1
   LH=B0+B1*T/(ET50+T) +B2*(BASEALB-40)+B3*(BASEWT-70)+LE+SL*DE;
   HAZD=EXP(LH)

   ;PK MODEL
   C2=A(1)/V1    ;BLOOD
   C3=A(2)/V2     ;PERIPHERAL
   TA=0
   CV=3
   IF (C2.GT.CV) TA=1
   C5=A(5)/V1
   C6=A(6)/V2
   TA1=0
   IF (C5.GT.CV) TA1=1
   DADT(1)=-CL*C2  -Q*C2 +Q*C3
   DADT(2)=Q*C2 -Q*C3
   DADT(3)=HAZD
   DADT(4)=HAZD
   DADT(5)=-CL*C5  -Q*C5 +Q*C6
   DADT(6)=Q*C5 -Q*C6
   DADT(7)=TA
   DADT(8)=TA1
$ERROR (OBS ONLY)
  TABOVE1=A(7)
  TABOVE2=A(8)
  ;IF (TIME.GT.BASET.AND.TIME.LE.ALAG5)PROP1=TABOVE1/(TIME-BASET)
  ;IF (TIME.GT.ALAG5) PROP1=(TABOVE1-TABOVE2)/ALAG5
  IF (TIME.GT.0) PROP1=A(7)/TIME
  CMHZ=A(3)
  CMHP=A(4)
  C1=A(1)/V1
  DE1=0
  IF (PROP1.GT.CP) DE1=1
  LHAZ=B0+B1*TIME/(ET50+TIME)+B2*(BASEALB-40)+B3*(BASEWT-70)+LE+SL*DE1;+(SLP+SLP2*EXP(-KX*TIME))*C2X

  ST=EXP(-CMHZ)    ;***Survival Function***;
  CMHZD=CMHZ-CMHP  ;Cumulative hazard at dose perior to T2E;
  PT1E=EXP(LHAZ-CMHZ)
  PT2E=EXP(-CMHZD)-EXP(-CMHZ) ;***Probability of T2E***;
  PT3E=EXP(-CMHZ)
  PT4E=1-PT3E
  QE1=0
  QE2=0
  QE3=0
  QE4=0
  IF (DV.EQ.1.AND.TLADA0.GT.0) QE2=1               ;***T2E***;
  IF (DV.EQ.0) QE3=1               ;CENSORED
  IF (DV.EQ.1.AND.TLADA0.LT.0) QE4=1
  LPT1E = LHAZ-CMHZ ;***Log-likelihood of T1E***;
  IF (PT2E.GT.0) THEN
     LPT2E = LOG(PT2E) ;***Log-likelihood of T2E - to avoid LOG(0)***;
  ELSE
     LPT2E =LOG(1)
  ENDIF
  LPT3E = -CMHZ     ;***Log-likelihood of T3E***;
  LPT4E=LOG(PT4E)
  LGL=QE2*LPT2E+QE3*LPT3E+QE4*LPT4E
  Y=-2*LGL


$THETA (4.20E-01  FIX) ;1 CLS
$THETA (4.01E+00  FIX) ;2 V1S
$THETA (3.06E-01  FIX) ;3 QS
$THETA (2.55E+00  FIX) ;4 V2S
$THETA (5.56E-01  FIX) ;5 WT CL
$THETA (6.39E-01 FIX) ;6 WT VDS
$THETA (-1.57E+00  FIX   );7 ALB CL
$THETA (6.58E-01  FIX)   ;8 NADAAMT CL
$THETA (6.38E-02 FIX); 9 LINES ON CL
$THETA (-2.11)            ;10 BASE LN HZ
$THETA (-7.07)            ;11 LINEAR TIME
$THETA (4.62)             ;12 ET50
$THETA (-0.0479)          ;13 ALB
$THETA (-0.0162)          ;14 WT
$THETA (0 FIX)            ;15 LINE 0
$THETA (0 FIX)            ;16 LINE 2
$THETA  (-2.93)          ;17 SL
$THETA  (-2.65)       ;18 CP

$OMEGA 0 FIX

$EST MAX=8000 PRINT=1 METHOD=0 -2LL NOABORT NSIG=2 SIGL=6
$COV COMPRESS MATRIX=R PRINT=E

$TABLE ID TIME BASEWT BASEALB STDY EVID IND1 PROP1 NOPRINT ONEHEADER NOAPPEND FILE=T25.TXT

NM-TRAN MESSAGES
 WARNINGS AND ERRORS (IF ANY) FOR PROBLEM    1
 (WARNING  2) NM-TRAN INFERS THAT THE DATA ARE POPULATION.
 (WARNING  3) THERE MAY BE AN ERROR IN THE ABBREVIATED CODE. THE FOLLOWING
 ONE OR MORE RANDOM VARIABLES ARE DEFINED WITH "IF" STATEMENTS THAT DO NOT
 PROVIDE DEFINITIONS FOR BOTH THE "THEN" AND "ELSE" CASES. IF ALL
 CONDITIONS FAIL, THE VALUES OF THESE VARIABLES WILL BE ZERO.
   PROP1
 (WARNING  21) THERE MAY BE AN ERROR IN THE ABBREVIATED CODE. THE FOLLOWING
 ONE OR MORE VARIABLES ARE DEFINED WITH "IF" STATEMENTS THAT DO NOT
 PROVIDE DEFINITIONS FOR BOTH THE "THEN" AND "ELSE" CASES. IF ALL
 CONDITIONS FAIL, THE VALUES OF THESE VARIABLES WILL BE ZERO.
   PROP
 (MU_WARNING 25) MU_001: DOES NOT APPEAR TO BE ASSOCIATED WITH ETA(001).
 (MU_WARNING 25) MU_002: DOES NOT APPEAR TO BE ASSOCIATED WITH ETA(002).
 (MU_WARNING 25) MU_003: DOES NOT APPEAR TO BE ASSOCIATED WITH ETA(003).
 (MU_WARNING 25) MU_004: DOES NOT APPEAR TO BE ASSOCIATED WITH ETA(004).
 (MU_WARNING 27) MU_002: CANNOT DEFINE MU_X WITH X > NO. OF ETAS IN PROBLEM: 001
 (MU_WARNING 27) MU_003: CANNOT DEFINE MU_X WITH X > NO. OF ETAS IN PROBLEM: 001
 (MU_WARNING 27) MU_004: CANNOT DEFINE MU_X WITH X > NO. OF ETAS IN PROBLEM: 001

1NONLINEAR MIXED EFFECTS MODEL PROGRAM (NONMEM) VERSION 7.3.0
 ORIGINALLY DEVELOPED BY STUART BEAL, LEWIS SHEINER, AND ALISON BOECKMANN
 CURRENT DEVELOPERS ARE ROBERT BAUER, ICON DEVELOPMENT SOLUTIONS,
 AND ALISON BOECKMANN. IMPLEMENTATION, EFFICIENCY, AND STANDARDIZATION
 PERFORMED BY NOUS INFOSYSTEMS.
 PROBLEM NO.:         1
 GEERT DATA FIT
 TOT. NO. OF OBS RECS:      317
 TOT. NO. OF INDIVIDUALS:    317
 GENERAL NONLINEAR KINETICS MODEL USING LSODA (ADVAN13)
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 #TBLN:      1
 #METH: First Order
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
 #TERM:
0MINIMIZATION SUCCESSFUL
 NO. OF FUNCTION EVALUATIONS USED:      277
 NO. OF SIG. DIGITS IN FINAL EST.:  2.2

 #TERE:
 Elapsed estimation time in seconds:   305.59
 Elapsed covariance time in seconds:   107.22

 ********************                                   FIRST ORDER                                  ********************
 #OBJT:**************                       MINIMUM VALUE OF OBJECTIVE FUNCTION                      ********************
 #OBJV:********************************************      384.428       **************************************************

 ********************                                   FIRST ORDER                                  ********************
 ********************                             FINAL PARAMETER ESTIMATE                           ********************

 THETA - VECTOR OF FIXED EFFECTS PARAMETERS   *********
         TH 1      TH 2      TH 3      TH 4      TH 5      TH 6      TH 7      TH 8      TH 9      TH10      TH11      TH12
          TH13      TH14      TH15      TH16      TH17      TH18
         4.20E-01  4.01E+00  3.06E-01  2.55E+00  5.56E-01  6.39E-01 -1.57E+00  6.58E-01  6.38E-02 -2.95E+00 -7.05E+00  4.70E+00
         -4.37E-02 -1.80E-02  0.00E+00  0.00E+00 -3.32E+00 -4.51E+00

 OMEGA - COV MATRIX FOR RANDOM EFFECTS - ETAS  ********
            ETA1
 ETA1
+        0.00E+00

 OMEGA - CORR MATRIX FOR RANDOM EFFECTS - ETAS  *******
            ETA1
 ETA1
+        0.00E+00

 ********************                                   FIRST ORDER                                  ********************
 ********************                            STANDARD ERROR OF ESTIMATE                          ********************

 THETA - VECTOR OF FIXED EFFECTS PARAMETERS   *********
         TH 1      TH 2      TH 3      TH 4      TH 5      TH 6      TH 7      TH 8      TH 9      TH10      TH11      TH12
          TH13      TH14      TH15      TH16      TH17      TH18
        ......... ......... ......... ......... ......... ......... ......... ......... .........  6.91E-01  6.94E-01  3.40E-01
          2.99E-02  8.89E-03 ......... .........  7.78E-01  2.98E-01

 OMEGA - COV MATRIX FOR RANDOM EFFECTS - ETAS  ********
            ETA1
 ETA1
+       .........

 OMEGA - CORR MATRIX FOR RANDOM EFFECTS - ETAS  *******
            ETA1
 ETA1
+       .........

 ********************                                   FIRST ORDER                                  ********************
 ********************                          COVARIANCE MATRIX OF ESTIMATE                         ********************

     TH10 | TH10      TH11 | TH10      TH11 | TH11      TH12 | TH10      TH12 | TH11      TH12 | TH12      TH13 | TH10
       4.77E-01        -3.97E-01         4.81E-01        -1.75E-01         7.61E-02         1.16E-01         6.42E-03
     TH13 | TH11      TH13 | TH12      TH13 | TH13      TH14 | TH10      TH14 | TH11      TH14 | TH12      TH14 | TH13
      -7.98E-03        -2.70E-04         8.95E-04         4.87E-04        -4.60E-04         7.50E-05         3.75E-06
     TH14 | TH14      TH17 | TH10      TH17 | TH11      TH17 | TH12      TH17 | TH13      TH17 | TH14      TH17 | TH17
       7.90E-05        -3.51E-01         3.37E-01         6.06E-02        -9.53E-03        -6.78E-04         6.06E-01
     TH18 | TH10      TH18 | TH11      TH18 | TH12      TH18 | TH13      TH18 | TH14      TH18 | TH17      TH18 | TH18
       2.46E-02        -1.95E-02        -8.53E-03         3.51E-04        -1.70E-05         7.68E-03         8.86E-02

 ********************                                   FIRST ORDER                                  ********************
 ********************                          CORRELATION MATRIX OF ESTIMATE                        ********************

     TH10 | TH10      TH11 | TH10      TH11 | TH11      TH12 | TH10      TH12 | TH11      TH12 | TH12      TH13 | TH10
       6.91E-01        -8.29E-01         6.94E-01        -7.44E-01         3.22E-01         3.40E-01         3.10E-01
     TH13 | TH11      TH13 | TH12      TH13 | TH13      TH14 | TH10      TH14 | TH11      TH14 | TH12      TH14 | TH13
      -3.85E-01        -2.65E-02         2.99E-02         7.94E-02        -7.46E-02         2.48E-02         1.41E-02
     TH14 | TH14      TH17 | TH10      TH17 | TH11      TH17 | TH12      TH17 | TH13      TH17 | TH14      TH17 | TH17
       8.89E-03        -6.53E-01         6.25E-01         2.29E-01        -4.09E-01        -9.80E-02         7.78E-01
     TH18 | TH10      TH18 | TH11      TH18 | TH12      TH18 | TH13      TH18 | TH14      TH18 | TH17      TH18 | TH18
       1.20E-01        -9.42E-02        -8.42E-02         3.94E-02        -6.42E-03         3.31E-02         2.98E-01
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
 ********************                                   FIRST ORDER                                  ********************
 ********************                      EIGENVALUES OF COR MATRIX OF ESTIMATE                     ********************

             1         2         3         4         5         6         7
         2.09E-02  3.64E-01  5.64E-01  9.78E-01  9.89E-01  1.14E+00  2.95E+00
 #CPUT: Total CPU Time in Seconds,      413.886
