Tue 06/12/2016
03:09 PM
$PROBLEM - INFLIXIMAB REFERENCE MODEL
;REFERENCE:

$INPUT ID TIME PPVCL PPVV1 PPVQ PPVV2 ALB WT ADA ERRPRO AMT CMT EVID RATE DV

$DATA ..\nonmem_simulation_input.csv IGNORE=C

$SUBROUTINE ADVAN6 TOL=5

$MODEL COMP=(CENT,DEFDOS,DEFOBS), COMP=(PERI)

$PK
 ;POPULATION PARAMETERS
 POPCL=THETA(1)
 POPV1=THETA(2)
 POPQ=THETA(3)
 POPV2=THETA(4)

 ;COVARIATE EFFECTS
 WT_CL=THETA(5) ;EFFECT OF WEIGHT ON CLEARANCE
 ALB_CL=THETA(9) ;EFFECT OF ALBUMIN ON CLEARANCE
 ADA_CL=THETA(10) ;EFFECT OF ANTI-DRUG ANTIBODIES ON CLEARANCE
 WT_V1=THETA(6) ;EFFECT OF WEIGHT ON V1
 WT_Q=THETA(7) ;EFFECT OF WEIGHT ON Q
 WT_V2=THETA(8) ;EFFECT OF WEGIHT ON V2

 D1=0.08333333 ;INFUSION INTO THE CENTRAL COMPARTMENT, SPECIFIED AS DURATION=2 HOURS (CONVERTED TO DAYS)

 ;ANTI-DRUG ANTIBODIES
 ADACOV=1 ;NO ANTI-DRUG ANTIBODIES
 IF (ADA.EQ.1) ADACOV=1+ADA_CL ;ANTI-DRUG ANTIBODIES PRESENT

 ;INDIVIDUAL PARAMETER VALUES
 CL=POPCL*((WT/70)**WT_CL)*((ALB/4)**ALB_CL)*ADACOV*EXP(PPVCL)
 V1=POPV1*((WT/70)**WT_V1)*EXP(PPVV1)
 Q=POPQ*((WT/70)**WT_Q)*EXP(PPVQ)
 V2=POPV2*((WT/70)**WT_V2)*EXP(PPVV2)

 S1=V1 ;SCALE FACTOR FOR V

 ;DUMMY ETA VALUES (BECAUSE THESE HAVE ALREADY BEEN SIMULATED AND ARE FOUND IN THE INPUT DATASET)
 DUM1=ETA(1)
 DUM2=ETA(2)
 DUM3=ETA(3)
 DUM4=ETA(4)

$DES
 DADT(1)=-Q/V1*A(1) +Q/V2*A(2) -CL/V1*A(1) ;CENTRAL COMPARTMENT
 DADT(2)=Q/V1*A(1) -Q/V2*A(2) ;PERIPHERAL COMPARTMENT

$THETA
 (0,0.294,) ;TVCL
 (0.1,3.33,) ;TVV1
 (0,0.0719,) ;TVQ
 (0,1.14,) ;TVV2

 0.614 ;WTONCL #POWER MODEL - REFERENCED TO 70 KG
 0.691 ;WTONV1
 1.10 ;WTONQ
 0.59 ;WTONV2

 -1.17 ;ALBONCL #POWER MODEL - REFERENCED TO 4 G/DL
 0.257 ;ADAONCL #DICHOTOMOUS PROPORTIONAL MODEL - OFFSET IS 1+0.257 WHEN ADA=1

$OMEGA
 0.106929 ;CLBSV  0.327^2
 0.0225 ;V1BSV 0.150^2
 1.21 ;QBSV  1.10^2
 0.638401 ;V2BSV  0.799^2

$SIGMA
 0.175561 ;RUVPROP 0.419^2

$ERROR
 A1=A(1)
 A2=A(2)
 IPRE=F
 Y=F*(1+ERRPRO)
 DUM5=ERR(1) ;DUMMY ERROR VALUE (ALREADY SIMULATED AS ERRPRO)

$SIMULATION (1234567) ONLYSIM SUBPROBLEMS=1

;$ESTIMATION METHOD=1 INTERACTION MAXEVALS=0 POSTHOC NOABORT NSIG=3 SIGL=9

;$COVARIANCE UNCONDITIONAL SIGL=12 PRINT=E

$TABLE ID TIME AMT RATE A1 A2 CL V1 Q V2 IPRE WT ADA ALB PPVCL PPVV1 PPVQ PPVV2 NOPRINT ONEHEADER FILE=nonmem_simulation_infliximab.fit

NM-TRAN MESSAGES
 WARNINGS AND ERRORS (IF ANY) FOR PROBLEM    1
 (WARNING  2) NM-TRAN INFERS THAT THE DATA ARE POPULATION.

1NONLINEAR MIXED EFFECTS MODEL PROGRAM (NONMEM) VERSION 7.3.0
 ORIGINALLY DEVELOPED BY STUART BEAL, LEWIS SHEINER, AND ALISON BOECKMANN
 CURRENT DEVELOPERS ARE ROBERT BAUER, ICON DEVELOPMENT SOLUTIONS,
 AND ALISON BOECKMANN. IMPLEMENTATION, EFFICIENCY, AND STANDARDIZATION
 PERFORMED BY NOUS INFOSYSTEMS.
 PROBLEM NO.:         1
 - INFLIXIMAB REFERENCE MODEL
 TOT. NO. OF OBS RECS:     7900
 TOT. NO. OF INDIVIDUALS:    100
 GENERAL NONLINEAR KINETICS MODEL (ADVAN6)
 PROBLEM NO.:         1     SUBPROBLEM NO.:      1
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 SIMULATION STEP PERFORMED
 #CPUT: Total CPU Time in Seconds,        1.812
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